# v20: add pair none for removing history
#      change fix id of wall/gran to contact eleminate history
# v19: add ifallcustom in one file or separate
# v18: add ifairviscous to determine air viscous
# v17: add option for print only max atom or trackid atom to a file
# v16: put all irrelevent command to other file
# v15: use immediate variable as much as possible. i.e. use immediate variable $() if the variable only define before run
# v14: fix pour
# v13: add maxKEt in thermo file.
#      restart file path changed
# v12: create atom method added. can choose create manually but not to use lattice
# v11: delete "then" in elif, put mp before kn
# v10: separate compute pair group for all and trace
# v9:  move timestep command to after unit defined
# v8:  compute pair group change from only tracegroup to all
# v7:  add runstep
# v6:  if append-->yes. simulation box extend, no delete when using createbox,
#      correct unit of freeze region to box. set no output if freq_* =0
# v5:  rounding number
# v4:  store force before fix (after pair). so get pair force

# initialization:
# timer
#timer loop # loop off full sync
# set step
variable rst_from index 0
variable ifset_velocity_after_rst index no
variable ifset_angular_velocity_after_rst index no
variable runstep index 1e7

variable runstep_loop index 1000000
if "${runstep_loop} == 0" then &
"variable n_loop equal 0" &
else &
"variable n_loop equal floor(v_runstep/v_runstep_loop)"

variable KEtr_to_jumpout equal 1e-25


# cd to output
shell	mkdir	output
# create output folders
shell	mkdir output/rst output/trace output/image/ output/image/all output/image/trace
shell	mkdir output/momentum_mass_field output/vtk output/stl output/movie output/setting
shell	mkdir output/pair_trace output/single_trace output/pair_all output/single_all
shell	mkdir output/wall
shell	mkdir output/test
# print start step
print "startstep ${rst_from}" screen no append output/setting/attribute.lammps
# step start from. weather rotate start.
variable  contact_change index no
variable  contact_model index hooke_his #hooke hooke_his hertz hertz_his
if "${contact_model} == hooke_his" then &
  "variable  contact_model_string string gran/hooke/history" &
elif "${contact_model} == hooke" &
 "variable  contact_model_string string gran/hooke" &
elif "${contact_model} == hertz_his" &
 "variable  contact_model_string string gran/hertz/history" &
else &
 "quit 1"

if "${contact_model} == hooke_his" then &
  "variable  contact_model_wall_string string hooke/history" &
elif "${contact_model} == hooke" &
 "variable  contact_model_wall_string string hooke" &
elif "${contact_model} == hertz_his" &
 "variable  contact_model_wall_string string hertz/history" &
else &
 "quit 1"

# task number from slurm
variable    n_mpi_tasks     getenv OMPI_COMM_WORLD_SIZE
# processor cut in x dimension
if "$(v_n_mpi_tasks%2)==0" then &
"variable	n_processor_x		index 2" &
else &
"variable	n_processor_x		index 1"
# timestep
variable	ts_scale		index 1
variable  ts          equal $(v_ts_scale*4e-7)
print "timestep ${ts}" screen no append output/setting/attribute.lammps
# ztop
variable  ifztop   index yes
# history
variable  eliminate_history   index no
variable	ifrotate		index no
variable	trace_id1		index 0  # 0 means no trace
variable	trace_id2		index 0  # 0 means no trace
variable	trace_id3		index 0  # 0 means no trace
variable	iftrace_maxKEt		index no
variable	iftrace_maxKEr		index no
variable	iftrace_maxKEtr		index no
shell	mkdir output/trace/
if "${trace_id1} != 0" then &
"shell	mkdir output/trace/${trace_id1}"
if "${trace_id2} != 0" then &
"shell	mkdir output/trace/${trace_id2}"
if "${trace_id3} != 0" then &
"shell	mkdir output/trace/${trace_id3}"
if "${iftrace_maxKEt} == yes" then &
"shell	mkdir output/trace/maxKEt"
if "${iftrace_maxKEr} == yes" then &
"shell	mkdir output/trace/maxKEr"
if "${iftrace_maxKEtr} == yes" then &
"shell	mkdir output/trace/maxKEtr"

variable	ifappend		string no
variable	iffreeze		string no
# create atom method
# no means no create , latt means lattice, test_collide_1wall1atom means test collide of 1 wall and 1 atom
# test_collide_twoatoms means test collide of two atoms
variable	create_atom_method	index latt
variable	ifpour			string no
variable  pourstep    equal 100
variable  pour_number equal 240000
variable  ifdeposit   string no
variable  deposit_number equal 120000

# chunk method
variable	chunk_method		string rz #x xy xyz r rz rzt NONE
print "chunk_method ${chunk_method}" screen no append output/setting/attribute.lammps
# ifsetvelocity
variable	ifsetvelocity		string no
# reset dt
variable	ifresetdt		index no
# recount dof
if		"(${ifpour} == yes) || (${ifdeposit} == yes)" then &
  "variable	recount_dof		string yes" &
else &
  "variable	recount_dof		string no"
# frequency output
# freq restart
variable	freq_restart_big	index 0
variable	freq_restart_small	index 0
# freq image
variable	freq_dump_trace_image	index 0
variable	freq_dump_all_image	index 0
# freq dump
variable	freq_dump_single_trace	index 0
variable	freq_dump_single_all	index 0
variable  n_maxfile_single_all  index -1
variable	freq_dump_pair_trace	index 0
variable	freq_dump_pair_all	index 0
variable	freq_dump_all_vtk		index 0
variable	freq_dump_all_stl		index 0
variable	freq_dump_all_movie		index 0
# freq thermo
variable	freq_thermo		index 0 #stagger(1e3,2e2)       #
variable  thermo_lost_error_or_warn index error
# freq print trace
variable	freq_print_trace	index 0
# freq fix vector
variable	freq_fixvector		index 0
variable	every_fixvector		index 0
# freq print velocity field
variable	freq_ave_chunk_momentum_mass_field		index 0  #Nevery=2, Nrepeat=6, and Nfreq=100, then 90,92,94,96,98,100 count for average
variable	repeat_ave_chunk_momentum_mass_field	index 0
variable	every_ave_chunk_momentum_mass_field		index 0
print "freq_ave_chunk_momentum_mass_field ${freq_ave_chunk_momentum_mass_field}" screen no append output/setting/attribute.lammps
# freq print wall
variable	freq_ave_wall		index 0  #Nevery=2, Nrepeat=6, and Nfreq=100, then 90,92,94,96,98,100 count for average
variable	repeat_ave_wall		index 0
variable	every_ave_wall		index 0
# freq rebalance
variable  	freq_balance      	index 0
# freq test
variable  	freq_test1      	index 0
variable  	freq_test2      	index 0
variable  	freq_test3      	index 0
# freq check_condition_exit
variable  	freq_check_condition_exit      	index -1
variable    ke_per_atom_check index 1.0e-17
# number of type
variable	n_type			index 3 #1 or 3 or  0 means no create
print "n_type ${n_type}" screen no append output/setting/attribute.lammps
# type ratio if n_type is 3
variable	ratio_type1			equal 0.3
variable	ratio_type2			equal 0.4
variable	ratio_type3			equal 0.3

# if air viscous
variable	ifairviscous		index yes
variable  gamma_air       index 100

# gravitational acceleration
variable	g			equal 9.8
print "gravitational_acceleration ${g}" screen no append output/setting/attribute.lammps


# particle diameter
variable	dp 			index 0.00083		#particle diameter
print "diameter ${dp}" screen no append output/setting/attribute.lammps
# define nbd radius
variable 	cutoff_dumpnb equal (1.11*v_dp)
# calculate radius
variable	rp		equal $(v_dp/2)		#particle radius
# particle density
variable	den 			index 2500
print "density ${den}" screen no append output/setting/attribute.lammps
# calculate mass
variable	mp 		equal $(4/3*PI*v_rp^3*v_den)
# radius of big and small atom
variable  dp_big_dp_unit		equal 1.1
variable	dp_small_dp_unit 	equal 0.9
variable  rp_big_dp_unit		equal $(v_dp_big_dp_unit/2)
variable	rp_small_dp_unit 	equal $(v_dp_small_dp_unit/2)

# skin
variable	skin_dp_unit		equal 0.5

## bulk parameter
# width and height of walls
variable	ri_wall_dp_unit		index 36	#inner radius
variable	width_wall_dp_unit		index 17	#width
variable  zlo_wall_dp_unit index 0
# height create particles
variable	z_length_create_dp_unit		index 31

## calculate wall box create
# calculate ro wall
variable	ro_wall_dp_unit		equal $(v_ri_wall_dp_unit+v_width_wall_dp_unit)
# zlo zhi create particles
variable	zlo_create_dp_unit	equal $(v_zlo_wall_dp_unit+v_rp_big_dp_unit)
variable  zhi_create_dp_unit equal $(v_zlo_create_dp_unit+v_z_length_create_dp_unit)
# ri ro create particles
variable	ro_create_dp_unit		equal $(v_ro_wall_dp_unit-v_rp_big_dp_unit)
variable	ri_create_dp_unit		equal $(v_ri_wall_dp_unit+v_rp_big_dp_unit)
# calculate zhi_wall
variable  zhi_wall_dp_unit equal $(v_zhi_create_dp_unit+4)
# simulation box
variable	zhi_box_dp_unit		equal $(v_zhi_wall_dp_unit+0.1)
variable	ro_box_dp_unit		equal $(v_ro_wall_dp_unit+0.1)
variable  zlo_box_dp_unit   equal $(v_zlo_wall_dp_unit-0.1)

# chunk height
variable	zhi_chunk_dp_unit	equal $(v_zhi_wall_dp_unit)
variable	zlo_chunk_dp_unit	equal $(v_zlo_wall_dp_unit)
variable	rhi_chunk_dp_unit	equal $(v_ro_wall_dp_unit)
variable	rlo_chunk_dp_unit	equal $(v_ri_wall_dp_unit)
# pour zlo zhi
variable	zlo_pour_dp_unit	equal $(v_zhi_box_dp_unit-2+0.999999999)
variable	zhi_pour_dp_unit	equal $(v_zhi_box_dp_unit-1)

# freeze region size
variable	zhi_freeze_dp_unit	equal 29
variable	ri_freeze_dp_unit	equal $(v_ri_wall_dp_unit-v_rp_big_dp_unit)
variable	ro_freeze_dp_unit	equal $(v_ro_wall_dp_unit+v_rp_big_dp_unit)

# contact model variable
variable	kn_scale	index 1000000
variable	kn		equal $(v_kn_scale*v_mp*v_g/v_dp)
variable	kt		equal $(2/7*v_kn)
variable	gamma_n_scale	index 317
variable	gamma_n		equal $(v_gamma_n_scale*sqrt(v_g/v_dp))
variable	gamma_t 	equal $(v_gamma_n/2)
variable	xmu		index 0.5
variable	ifdamp_tangent	equal 1

print "kn ${kn}" screen no append output/setting/attribute.lammps
print "kt ${kt}" screen no append output/setting/attribute.lammps
print "gamma_n ${gamma_n}" screen no append output/setting/attribute.lammps
print "gamma_t ${gamma_t}" screen no append output/setting/attribute.lammps
print "friction_coefficient ${xmu}" screen no append output/setting/attribute.lammps

if "${n_type} == 3" then &
  "variable cutoff_soft_11_dp_unit equal $(2*v_rp_small_dp_unit)" &
  "variable cutoff_soft_22_dp_unit equal 1" &
  "variable cutoff_soft_33_dp_unit equal $(2*v_rp_big_dp_unit)" &
  "variable cutoff_soft_12_dp_unit equal $(v_rp_small_dp_unit+0.5)" &
  "variable cutoff_soft_13_dp_unit equal $(v_rp_small_dp_unit+v_rp_big_dp_unit)" &
  "variable cutoff_soft_23_dp_unit equal $(0.5+v_rp_big_dp_unit)" &
elif "${n_type} == 1" &
  "variable cutoff_soft_dp_unit equal 1" &
else &
  "print 'n_type not 3 or 1'"

# number of chunk
variable	bin_z_dp_unit_approximate 	equal 3
variable	bin_r_dp_unit_approximate 	equal 1

variable	N_bin_z 	equal $(round((v_zhi_chunk_dp_unit-v_zlo_chunk_dp_unit)/v_bin_z_dp_unit_approximate))
variable	N_bin_r 	equal $(round((v_rhi_chunk_dp_unit-v_rlo_chunk_dp_unit)/v_bin_r_dp_unit_approximate))
variable	N_bin_theta	equal $(round(1/v_ri_wall_dp_unit))

print "N_bin_z ${N_bin_z}" screen no append output/setting/attribute.lammps
print "N_bin_r ${N_bin_r}" screen no append output/setting/attribute.lammps
print "N_bin_theta ${N_bin_theta}" screen no append output/setting/attribute.lammps
# salvage number
variable	Sa 		index 0.00000002

# calculate container size
variable	ro_wall		equal $(v_ro_wall_dp_unit*v_dp)
variable	ri_wall 		equal $(v_ri_wall_dp_unit*v_dp)
variable  zlo_wall equal $(v_zlo_wall_dp_unit*v_dp)
variable  zhi_wall equal $(v_zhi_wall_dp_unit*v_dp)
print "ro_wall ${ro_wall}" screen no append output/setting/attribute.lammps
print "ri_wall ${ri_wall}" screen no append output/setting/attribute.lammps
print "zlo_wall ${zlo_wall}" screen no append output/setting/attribute.lammps
print "zhi_wall ${zhi_wall}" screen no append output/setting/attribute.lammps
# calculate chunk height
variable	zhi_chunk	equal $(v_zhi_chunk_dp_unit*v_dp)
variable	zlo_chunk	equal $(v_zlo_chunk_dp_unit*v_dp)
variable	rhi_chunk	equal $(v_rhi_chunk_dp_unit*v_dp)
variable	rlo_chunk	equal $(v_rlo_chunk_dp_unit*v_dp)
# calculate simulation box size
variable ro_box equal $(v_ro_box_dp_unit*v_dp)
variable zhi_box 	equal $(v_zhi_box_dp_unit*v_dp)
variable zlo_box 	equal $(v_zlo_box_dp_unit*v_dp)
# calculate diameter of big and small
variable	dp_big		equal $(v_dp_big_dp_unit*v_dp)
variable	dp_small	equal $(v_dp_small_dp_unit*v_dp)
print "dp_big ${dp_big}" screen no append output/setting/attribute.lammps
print "dp_small ${dp_small}" screen no append output/setting/attribute.lammps

# calculate skin
variable	skin		equal $(v_skin_dp_unit*v_dp)

# calculate size of region to create atoms
variable	ri_create	equal $(v_ri_create_dp_unit*v_dp)
variable	ro_create	equal $(v_ro_create_dp_unit*v_dp)
variable	zlo_create	equal $(v_zlo_create_dp_unit*v_dp)
variable	zhi_create	equal $(v_zhi_create_dp_unit*v_dp)

# calculate pour zlo zhi
variable	zlo_pour	equal $(v_zlo_pour_dp_unit*v_dp)
variable	zhi_pour	equal $(v_zhi_pour_dp_unit*v_dp)

# calculate number of bin
variable	N_total_bin 	equal v_N_bin_r*v_N_bin_theta*v_N_bin_z
variable	N_total_rz 	equal v_N_bin_r*v_N_bin_z

# calculate inner wall speed
variable	omega_in 	equal $(sqrt(v_Sa*v_g*(v_ro_wall-v_ri_wall)^3/(v_dp)^2/v_ri_wall^2))
print "omega_in ${omega_in}" screen no append output/setting/attribute.lammps
variable	in_velocity 	equal $(-v_omega_in*v_ri_wall)
variable	in_velocity_negative 	equal $(-v_in_velocity)

# calculate freeze region size
variable	zhi_freeze		equal $(v_zhi_freeze_dp_unit*v_dp)
variable	ri_freeze		equal $(v_ri_freeze_dp_unit*v_dp)
variable        ro_freeze		equal $(v_ro_freeze_dp_unit*v_dp)

# lattice primitive vectors length
variable	edge_lattice		equal $(2/(sqrt(3))*v_dp_big)
variable	z_fraction_of_lattice	equal $(sqrt(3)/4)

# define cylinder coordinate position velocity
variable	d_z_axis	atom sqrt(x*x+y*y)
variable	theta 		atom atan2(y,x)
variable	vr 		atom (vx*x+vy*y)/sqrt(x*x+y*y)
variable	vt 		atom (vx*(-y)+vy*x)/sqrt(x*x+y*y)
variable  mvz     atom mass*vz
variable	mvr 		atom mass*v_vr
variable	mvt 		atom mass*v_vt
variable	Ekz 		atom 0.5*mass*vz*vz
variable	Ekr 		atom 0.5*mass*v_vr*v_vr
variable	Ekt 		atom 0.5*mass*v_vt*v_vt
variable	mr 		atom mass*v_vr
variable	mz 		atom mass*z

variable	check_vrvtvxvy 	atom v_vt*v_vt+v_vr*v_vr-vx*vx-vy*vy

# calculate chunk id
variable	rbin		atom "floor( (v_d_z_axis-v_rlo_chunk)/ (v_rhi_chunk-v_rlo_chunk)* v_N_bin_r )"
variable	zbin		atom "floor((z-v_zlo_chunk)/ (v_zhi_chunk-v_zlo_chunk)* v_N_bin_z)"
variable        chunk_id_r_z	atom 1+v_N_bin_r*v_zbin+v_rbin

# calculate soft coefficient
if "${n_type} == 3" then &
  "variable cutoff_soft_11 equal $(v_cutoff_soft_11_dp_unit*v_dp)" &
  "variable cutoff_soft_22 equal $(v_cutoff_soft_22_dp_unit*v_dp)" &
  "variable cutoff_soft_33 equal $(v_cutoff_soft_33_dp_unit*v_dp)" &
  "variable cutoff_soft_12 equal $(v_cutoff_soft_12_dp_unit*v_dp)" &
  "variable cutoff_soft_13 equal $(v_cutoff_soft_13_dp_unit*v_dp)" &
  "variable cutoff_soft_23 equal $(v_cutoff_soft_23_dp_unit*v_dp)" &
  "variable coeff_soft_11 equal $(v_kn*v_cutoff_soft_11^2/PI^2)" &
  "variable coeff_soft_22 equal $(v_kn*v_cutoff_soft_22^2/PI^2)" &
  "variable coeff_soft_33 equal $(v_kn*v_cutoff_soft_33^2/PI^2)" &
  "variable coeff_soft_12 equal $(v_kn*v_cutoff_soft_12^2/PI^2)" &
  "variable coeff_soft_13 equal $(v_kn*v_cutoff_soft_13^2/PI^2)" &
  "variable coeff_soft_23 equal $(v_kn*v_cutoff_soft_23^2/PI^2)" &
elif "${n_type} == 1" &
  "variable cutoff_soft equal $(v_kn*v_cutoff_soft_dp_unit*v_dp)" &
  "variable coeff_soft equal $(v_cutoff_soft^2/PI^2)" &
else &
  "print 'n_type not 3 or 1'"

# processor
processors  ${n_processor_x} * *

# jump to restart section
if	"${rst_from} > 0" 	then "jump SELF end_restart_skip1"
#newton
# default is on so only need when off
#newton       on
# setting, no restart
atom_style	sphere
atom_modify	map array
boundary	f f f
units		si
#timestep
timestep     ${ts}
# communication, no restart
comm_style	brick
comm_modify	vel yes

# reg to define box, no restart
region		simulation_box cylinder z 0. 0. ${ro_box} ${zlo_box} ${zhi_box} units box

# create box
create_box	${n_type} simulation_box
# contact force style, no restart

if "${n_type} == 3" then &
  "pair_style soft 1.0" &
  "pair_coeff 1 1 $(v_coeff_soft_11) $(v_cutoff_soft_11)" &
  "pair_coeff 2 2 $(v_coeff_soft_22) $(v_cutoff_soft_22)" &
  "pair_coeff 3 3 $(v_coeff_soft_33) $(v_cutoff_soft_33)" &
  "pair_coeff 1 2 $(v_coeff_soft_12) $(v_cutoff_soft_12)" &
  "pair_coeff 1 3 $(v_coeff_soft_13) $(v_cutoff_soft_13)" &
  "pair_coeff 2 3 $(v_coeff_soft_23) $(v_cutoff_soft_23)" &
elif "${n_type} == 1" &
  "pair_style soft 1.0" &
  "pair_coeff * * $(v_coeff_soft) $(v_cutoff_soft)" &
else &
  "print 'n_type not 3 or 1'"

if		"${freq_ave_wall} != 0" then &
  "fix	sum_pairforce	all store/force"

# insert region
region	out_inbdy_insert 	cylinder z 0. 0. ${ri_create} ${zlo_box} ${zhi_box} units box side out
region	in_outbdy_insert 	cylinder z 0. 0. ${ro_create} ${zlo_create} ${zhi_create} units box
region	region_ins_0		intersect 2 out_inbdy_insert in_outbdy_insert units box

# insert more region
region	out_inbdy_append 	cylinder z 0. 0. ${ri_freeze} 0 ${zhi_freeze} units box side out
region	in_outbdy_append 	cylinder z 0. 0. ${ro_freeze} 0 ${zhi_freeze} units box
region	region_append		intersect 2 out_inbdy_append in_outbdy_append units box

# extend insert region to freeze region
if "${ifappend} == no" then &
  "region	region_ins	intersect 2 out_inbdy_insert in_outbdy_insert units box" &
else &
  "region	region_ins	union 2 region_ins_0 region_append units box"


if "${create_atom_method} == no" then &
  "jump SELF end_create"

# create particle at lattice, no restart
# with scale = 1, a1 = 1 0 0, a2 = 0 1 0, and a3 = 0 0 1, no restart

lattice       bcc ${edge_lattice} origin 0 0 ${z_fraction_of_lattice}

if "${n_type} == 3" then &
  "jump SELF begin3type" &
elif "${n_type} == 1" &
  "jump SELF begin1type" &
else &
  "print 'n_type not 3 or 1'"

# 3type begin
label		begin3type

# jump create atom by lattice
if "${create_atom_method} != latt" then &
  "jump SELF end_lattice1"
create_atoms	2 region region_ins units lattice


set		atom * type/fraction 1 0.6 12393
set		type 1 type/fraction 3 0.5 12235
# set diameter before density, otherwise mass won't fit, no restart
set		type 1 diameter ${dp_small}
set		type 2 diameter ${dp}
set		type 3 diameter ${dp_big}
set		atom * density 	${den}

#displace
#displace_atoms all random 1e-11 1e-11 0 987 units box

# 3type end
jump		SELF end_create
label   end_lattice1

# 1type begin
label		begin1type
# jump create atom by lattice
if "${create_atom_method} != latt" then &
  "jump SELF end_lattice2"
create_atoms	1 region region_ins units lattice
# set diameter before density, otherwise mass won't fit, no restart
set		atom * diameter ${dp}
set		atom * density 	${den}
jump		SELF end_create
label   end_lattice2

if "${create_atom_method} != test_collide_1wall1atom" then &
  "jump SELF end_test_collide_1wall1atom"
#create_atoms	1 region region_ins units lattice
# test create 1 single atoms let inner wall collision
create_atoms 1 single $(0*v_dp) $((v_ri_wall_dp_unit+0.6)*v_dp) $(0.50001*v_dp) units box
# set diameter before density, otherwise mass won't fit, no restart
set		atom * diameter ${dp}
set		atom * density 	${den}
# test set velocity
set atom 1 vy $(-1.0*v_dp)
#set atom 1 vz $(-1.0*v_dp)
#set atom 2 vy $(1.0*v_dp)
# test non parallel rotate (Say contact point is c, the plane composited by vc and ac will changed over the contact time.)
set atom 1 omega 1.0 0 0
jump		SELF end_create
label   end_test_collide_1wall1atom

if "${create_atom_method} != test_collide_twoatoms" then &
  "jump SELF end_test_collide_twoatoms"

#create_atoms	1 region region_ins units lattice
# test create 3 single atoms let 1 2 collision
create_atoms 1 single $((v_ri_wall_dp_unit+3.5)*v_dp) $(0.434*v_dp) $(1*v_dp) units box
create_atoms 1 single $((v_ri_wall_dp_unit+3)*v_dp) $(-0.434*v_dp) $(1*v_dp) units box
create_atoms 1 single $(-(v_ri_wall_dp_unit+3)*v_dp) $(0.5*v_dp) $(1*v_dp) units box
# set diameter before density, otherwise mass won't fit, no restart
set		atom * diameter ${dp}
set		atom * density 	${den}
# test set velocity
set atom 1 vy $(-1.0*v_dp)
set atom 2 vy $(1.0*v_dp)

# test non parallel rotate (Say contact point is c, the plane composited by vc and ac will changed over the contact time.)
set atom 1 omega 1.0 0 0
jump		SELF end_create
label   end_test_collide_twoatoms

# create end
label		end_create

# file, restart 0 step
write_restart	output/rst/restart.mpiio.*

# jump gravity ifpour and step from 0
if "${ifpour} == no || ${rst_from} != 0" then "jump SELF end_pour5"
# gravity
fix	gravi 		all gravity $g vector 0.0 0.0 -1.0
# gravitational potential
fix_modify		gravi energy yes
label	end_pour5
# pour region, block, z-axis cylinder, side = in, no restart
if "${ifpour} == no || ${rst_from} != 0" then "jump SELF end_pour"
label	begin_pour
region	pour_region	cylinder z 0. 0. ${ro_create} ${zlo_pour} ${zhi_pour} units box
fix	pour_fix	all pour ${pour_number} 1 300719 region pour_region diam poly 3 $(0.9*v_dp) $(v_ratio_type1) $(v_dp) $(v_ratio_type2) $(1.1*v_dp) $(v_ratio_type3) dens 2500 2500 vol 100000 1
label	end_pour

# deposit region, block, z-axis cylinder, side = in, no restart
if "${ifdeposit} == no || ${rst_from} != 0" then "jump SELF end_deposit"

label	begin_deposit
region  deposit_in_region_sideout cylinder z 0. 0. ${ri_create} ${zlo_pour} ${zhi_pour} units box side out
region  deposit_out_region	cylinder z 0. 0. ${ro_create} ${zlo_pour} ${zhi_pour} units box
region  deposit_region intersect 2 deposit_in_region_sideout deposit_out_region units box

if "${n_type} == 3" then &
  "jump SELF begin3type_deposit" &
elif "${n_type} == 1" &
  "jump SELF begin1type_deposit" &
else &
  "print 'n_type not 3 or 1'"

# 1type deposit begin
label		begin1type_deposit

fix	deposit_type1_fix	all deposit ${v_deposit_number} 1 1 29494 region deposit_region near ${dp} units box
set		type * diameter ${dp}
set		atom * density 	${den}
jump SELF end_deposit

# 3type deposit begin
label		begin3type_deposit
# set diameter before density, otherwise mass won't fit, no restart

variable number_type1 equal $(v_ratio_type1*v_deposit_number)
variable number_type2 equal $(v_ratio_type2*v_deposit_number)
variable number_type3 equal $(v_ratio_type3*v_deposit_number)
fix	deposit_type1_fix	all deposit ${number_type1} 1 4 29494 region deposit_region near ${dp_big} units box
fix	deposit_type2_fix	all deposit ${number_type2} 2 3 12235 region deposit_region near ${dp_big} units box
fix	deposit_type3_fix	all deposit ${number_type3} 3 4 777 region deposit_region near ${dp_big} units box
set		type 1 diameter ${dp_small}
set		type 2 diameter ${dp}
set		type 3 diameter ${dp_big}
set		atom * density 	${den}
jump SELF end_deposit

label	end_deposit
label		end_restart_skip1

# jump if restart from nonzero step
# this command specify in jobscribe "variable	rst_from equal N" be used as suffix in output file name
if		"${rst_from} != 0" then &
  "read_restart restart.mpiio.${rst_from}"

# bin size and memory
neighbor	${skin} bin
neigh_modify	delay 0 #page 20

if		"${rst_from} != 0 && ${freq_ave_wall} != 0" then &
  "fix	sum_pairforce	all store/force"


# balance
#balance 	1.0 shift yz 100 1.02

# particle force (apply force from the one need to be output and small to large)
# store force fx fy fz

# wall force to particles
# inner wall
# define inner wall, if pour then define inner wall after pouring
if "${ifpour} == yes && ${rst_from} == 0" then "jump SELF end_pour6_innerwall"
if "${freq_ave_wall} != 0" then "fix	storeforce_inwall_before	all store/force"
if "${contact_model} != hooke_his" &
 then "jump SELF hooke_his_end1"

if "${ifrotate} == yes" then &
  "fix	inwall		all wall/gran hooke/history ${kn} ${kt} ${gamma_n} ${gamma_t} ${xmu} ${ifdamp_tangent} zcylinder ${ri_wall} shear x ${in_velocity_negative}" &
else &
  "fix	inwall		all wall/gran hooke/history ${kn} ${kt} ${gamma_n} ${gamma_t} ${xmu} ${ifdamp_tangent} zcylinder ${ri_wall}"
label hooke_his_end1

if "${contact_model} != hooke" &
 then "jump SELF hooke_end1"
if "${ifrotate} == yes" then &
  "fix	inwall		all wall/gran hooke ${kn} ${kt} ${gamma_n} ${gamma_t} ${xmu} ${ifdamp_tangent} zcylinder ${ri_wall} shear x ${in_velocity_negative}" &
else &
  "fix	inwall		all wall/gran hooke ${kn} ${kt} ${gamma_n} ${gamma_t} ${xmu} ${ifdamp_tangent} zcylinder ${ri_wall}"
label hooke_end1
if "${freq_ave_wall} != 0" then "fix	storeforce_inwall_after	all store/force"
label	end_pour6_innerwall

if "${contact_model} != hooke_his" &
 then "jump SELF hooke_his_end2"
if "${freq_ave_wall} != 0" then "fix	storeforce_outwall_before	all store/force"
fix	outwall 	all wall/gran hooke/history ${kn} ${kt} ${gamma_n} ${gamma_t} ${xmu} ${ifdamp_tangent} zcylinder ${ro_wall}
if "${freq_ave_wall} != 0" then "fix	storeforce_outwall_after	all store/force"
if "${freq_ave_wall} != 0" then "fix	storeforce_zbottom_before	all store/force"
fix	zplane_bottom 	all wall/gran hooke/history ${kn} ${kt} ${gamma_n} ${gamma_t} ${xmu} ${ifdamp_tangent} zplane ${zlo_wall} NULL
if "${freq_ave_wall} != 0" then "fix	storeforce_zbottom_after	all store/force"
if "${ifztop} != yes" then "jump SELF ztop_end1"
if "${freq_ave_wall} != 0" then "fix	storeforce_ztop_before	all store/force"
fix	zplane_top 	all wall/gran hooke/history ${kn} ${kt} ${gamma_n} ${gamma_t} ${xmu} ${ifdamp_tangent} zplane NULL ${zhi_wall}
if "${freq_ave_wall} != 0" then "fix	storeforce_ztop_after	all store/force"
label ztop_end1
label hooke_his_end2

if "${contact_model} != hooke" &
 then "jump SELF hooke_end2"
if "${freq_ave_wall} != 0" then "fix	storeforce_outwall_before	all store/force"
fix	outwall 	all wall/gran hooke ${kn} ${kt} ${gamma_n} ${gamma_t} ${xmu} ${ifdamp_tangent} zcylinder ${ro_wall}
if "${freq_ave_wall} != 0" then "fix	storeforce_outwall_after	all store/force"
if "${freq_ave_wall} != 0" then "fix	storeforce_zbottom_before	all store/force"
fix	zplane_bottom 	all wall/gran hooke ${kn} ${kt} ${gamma_n} ${gamma_t} ${xmu} ${ifdamp_tangent} zplane ${zlo_wall} NULL
if "${freq_ave_wall} != 0" then "fix	storeforce_zbottom_after	all store/force"
if "${ifztop} != yes" then "jump SELF ztop_end2"
if "${freq_ave_wall} != 0" then "fix	storeforce_ztop_before	all store/force"
fix	zplane_top 	all wall/gran hooke ${kn} ${kt} ${gamma_n} ${gamma_t} ${xmu} ${ifdamp_tangent} zplane NULL ${zhi_wall}
if "${freq_ave_wall} != 0" then "fix	storeforce_ztop_after	all store/force"
label ztop_end2
label hooke_end2


# jump gravity ifpour and step from 0
if "${ifpour} == yes && ${rst_from} == 0" then "jump SELF end_pour4"
# gravity
fix	gravi 		all gravity $g vector 0.0 0.0 -1.0
# gravitational potential
fix_modify		gravi energy yes
label	end_pour4

if "${iffreeze} == no" then "jump SELF label_end_freeze"
# freeze region
region	region_freeze	block INF INF INF INF INF ${zhi_freeze} units box
# freeze atoms, but freeze_group not to be re-define when restart
if      "${rst_from} == 0"	then "group	freeze_group	region region_freeze"
if	"${ifsetvelocity} == yes"	then "velocity freeze_group set 0 0 0"
fix	freeze_fix	freeze_group freeze

label	label_end_freeze

# air viscous
print "ifairviscous ${ifairviscous}" screen no append output/setting/attribute.lammps
print "gamma_air ${gamma_air}" screen no append output/setting/attribute.lammps
if "${ifairviscous} == no" then &
  "jump SELF end_airviscous"
if "${freq_ave_wall} != 0" then "fix	storeforce_airviscous_before	all store/force"
fix airviscous all viscous $(v_gamma_air*v_mp)
if "${freq_ave_wall} != 0" then "fix	storeforce_airviscous_after	all store/force"
label   end_airviscous

# ensure temperture normalize correctly as particle number change. use when pour and temperature compute ke
if "${recount_dof} == yes" then &
  "compute_modify		thermo_temp dynamic/dof yes"

# nve integration update position velocity
if "${ifresetdt} == yes" then &
  "fix	reset		all dt/reset 1 NULL NULL $(sqrt(2*v_mp*v_g*v_zhi_box/v_kn)*sin(PI/50)) emax $(v_mp*v_g*v_zhi_box/25) units box"
fix	integr		all nve/sphere


# output
# output variable
variable	t equal time

# compute chunk
if "${freq_ave_chunk_momentum_mass_field} == 0" then "jump SELF skip_ave_chunk"
compute		chunk_r_z all chunk/atom v_chunk_id_r_z limit ${N_total_rz} exact discard yes
# file, output by fix ave/chunk
if "${freq_ave_chunk_momentum_mass_field} == 0" then "jump SELF skip_ave_chunk"
compute		m1 all property/atom mass
fix		avspatial all ave/chunk ${every_ave_chunk_momentum_mass_field} ${repeat_ave_chunk_momentum_mass_field} ${freq_ave_chunk_momentum_mass_field} chunk_r_z &
v_mvr v_mvt v_mvz v_Ekt v_Ekr v_Ekz c_m1 temp v_mr v_mz norm none file output/momentum_mass_field/fix.momentum_mass_field.all
label skip_ave_chunk
### wall force
if "${freq_ave_wall} == 0" then "jump SELF skip_ave_wall1"
## inwall force
# compute total force on particles before inwall apply
variable	storeforce_inwall_before_r atom (f_storeforce_inwall_before[1]*x+f_storeforce_inwall_before[2]*y)/sqrt(x*x+y*y)
variable	storeforce_inwall_before_theta atom (f_storeforce_inwall_before[1]*(-y)+f_storeforce_inwall_before[2]*x)/sqrt(x*x+y*y)
compute		sum_storeforce_inwall_before_r all reduce sum v_storeforce_inwall_before_r
compute		sum_storeforce_inwall_before_theta all reduce sum v_storeforce_inwall_before_theta
compute		sum_storeforce_inwall_before_z all reduce sum f_storeforce_inwall_before[3]
# compute total force on particles after inwall apply
variable	storeforce_inwall_after_r atom (f_storeforce_inwall_after[1]*x+f_storeforce_inwall_after[2]*y)/sqrt(x*x+y*y)
variable	storeforce_inwall_after_theta atom (f_storeforce_inwall_after[1]*(-y)+f_storeforce_inwall_after[2]*x)/sqrt(x*x+y*y)
compute		sum_storeforce_inwall_after_r all reduce sum v_storeforce_inwall_after_r
compute		sum_storeforce_inwall_after_theta all reduce sum v_storeforce_inwall_after_theta
compute		sum_storeforce_inwall_after_z all reduce sum f_storeforce_inwall_after[3]
# total force all atoms on inwall by substract
variable	force_inwall_r equal c_sum_storeforce_inwall_after_r-c_sum_storeforce_inwall_before_r
variable	force_inwall_theta equal c_sum_storeforce_inwall_after_theta-c_sum_storeforce_inwall_before_theta
variable	force_inwall_z equal c_sum_storeforce_inwall_after_z-c_sum_storeforce_inwall_before_z

## outwall force
# compute total force on particles before outwall apply
variable	storeforce_outwall_before_r atom (f_storeforce_outwall_before[1]*x+f_storeforce_outwall_before[2]*y)/sqrt(x*x+y*y)
variable	storeforce_outwall_before_theta atom (f_storeforce_outwall_before[1]*(-y)+f_storeforce_outwall_before[2]*x)/sqrt(x*x+y*y)
compute		sum_storeforce_outwall_before_r all reduce sum v_storeforce_outwall_before_r
compute		sum_storeforce_outwall_before_theta all reduce sum v_storeforce_outwall_before_theta
compute		sum_storeforce_outwall_before_z all reduce sum f_storeforce_outwall_before[3]
# compute total force on particles after outwall apply
variable	storeforce_outwall_after_r atom (f_storeforce_outwall_after[1]*x+f_storeforce_outwall_after[2]*y)/sqrt(x*x+y*y)
variable	storeforce_outwall_after_theta atom (f_storeforce_outwall_after[1]*(-y)+f_storeforce_outwall_after[2]*x)/sqrt(x*x+y*y)
compute		sum_storeforce_outwall_after_r all reduce sum v_storeforce_outwall_after_r
compute		sum_storeforce_outwall_after_theta all reduce sum v_storeforce_outwall_after_theta
compute		sum_storeforce_outwall_after_z all reduce sum f_storeforce_outwall_after[3]
# total force all atoms on outwall by substract
variable	force_outwall_r equal c_sum_storeforce_outwall_after_r-c_sum_storeforce_outwall_before_r
variable	force_outwall_theta equal c_sum_storeforce_outwall_after_theta-c_sum_storeforce_outwall_before_theta
variable	force_outwall_z equal c_sum_storeforce_outwall_after_z-c_sum_storeforce_outwall_before_z

## zbottom force
# compute total force on particles before zbottom apply
variable	storeforce_zbottom_before_r atom (f_storeforce_zbottom_before[1]*x+f_storeforce_zbottom_before[2]*y)/sqrt(x*x+y*y)
variable	storeforce_zbottom_before_theta atom (f_storeforce_zbottom_before[1]*(-y)+f_storeforce_zbottom_before[2]*x)/sqrt(x*x+y*y)
compute		sum_storeforce_zbottom_before_r all reduce sum v_storeforce_zbottom_before_r
compute		sum_storeforce_zbottom_before_theta all reduce sum v_storeforce_zbottom_before_theta
compute		sum_storeforce_zbottom_before_z all reduce sum f_storeforce_zbottom_before[3]
# compute total force on particles after zbottom apply
variable	storeforce_zbottom_after_r atom (f_storeforce_zbottom_after[1]*x+f_storeforce_zbottom_after[2]*y)/sqrt(x*x+y*y)
variable	storeforce_zbottom_after_theta atom (f_storeforce_zbottom_after[1]*(-y)+f_storeforce_zbottom_after[2]*x)/sqrt(x*x+y*y)
compute		sum_storeforce_zbottom_after_r all reduce sum v_storeforce_zbottom_after_r
compute		sum_storeforce_zbottom_after_theta all reduce sum v_storeforce_zbottom_after_theta
compute		sum_storeforce_zbottom_after_z all reduce sum f_storeforce_zbottom_after[3]
# total force all atoms on zbottom by substract
variable	force_zbottom_r equal c_sum_storeforce_zbottom_after_r-c_sum_storeforce_zbottom_before_r
variable	force_zbottom_theta equal c_sum_storeforce_zbottom_after_theta-c_sum_storeforce_zbottom_before_theta
variable	force_zbottom_z equal c_sum_storeforce_zbottom_after_z-c_sum_storeforce_zbottom_before_z

label skip_ave_wall1

compute		KEt all ke
compute		KEr all erotate/sphere
variable	KEtr equal "ke + c_KEr"
variable	EKP equal "ke + c_KEr + pe"
# compute
compute		n_contact all contact/atom
compute		KEt_atom all ke/atom
compute		KEr_atom all erotate/sphere/atom
variable	KEtr_atom atom "c_KEt_atom + c_KEr_atom"
compute		PE_atom all pe/atom
variable        EKP_atom atom "c_KEt_atom + c_KEr_atom + c_PE_atom"

# compute id
compute         id_atom all property/atom id

# compute specific atom id by reduce
compute		id_maxKEt all reduce max c_id_atom c_KEt_atom replace 1 2
compute		id_maxKEr all reduce max c_id_atom c_KEr_atom replace 1 2
compute		id_maxKEtr all reduce max c_id_atom v_KEtr_atom replace 1 2

# initially define trace id
variable	check_nbid1 atom false
variable	check_nbid2 atom false
variable	check_nbid3 atom false
variable	check_nbmaxKEt atom false
variable	check_nbmaxKEr atom false
variable	check_nbmaxKEtr atom false

# trace id maxKEt
if "${iftrace_maxKEt} == no" then &
  "jump SELF end_tracemaxKEt"
## define trace group, single atom or region near an atom
variable	trace_id_maxKEt equal c_id_maxKEt[1]
variable	check_nbmaxKEt atom " (x-x[v_trace_id_maxKEt] )^2 + (y-y[v_trace_id_maxKEt] )^2 + (z-z[v_trace_id_maxKEt] )^2 < v_cutoff_dumpnb^2 "
label		end_tracemaxKEt

# trace id maxKEr
if "${iftrace_maxKEr} == no" then &
  "jump SELF end_tracemaxKEr"
## define trace group, single atom or region near an atom
variable	trace_id_maxKEr equal c_id_maxKEr[1]
variable	check_nbmaxKEr atom " (x-x[v_trace_id_maxKEr] )^2 + (y-y[v_trace_id_maxKEr] )^2 + (z-z[v_trace_id_maxKEr] )^2 < v_cutoff_dumpnb^2 "
label		end_tracemaxKEr

# trace id maxKEtr
if "${iftrace_maxKEtr} == no" then &
  "jump SELF end_tracemaxKEtr"
## define trace group, single atom or region near an atom
variable	trace_id_maxKEtr equal c_id_maxKEtr[1]
variable	check_nbmaxKEtr atom " (x-x[v_trace_id_maxKEtr] )^2 + (y-y[v_trace_id_maxKEtr] )^2 + (z-z[v_trace_id_maxKEtr] )^2 < v_cutoff_dumpnb^2 "
label		end_tracemaxKEtr

# trace id1
if "${trace_id1} == 0" then &
  "jump SELF end_traceid1"
## define trace group, single atom or region near an atom
variable	check_nbid1 atom " (x-x[v_trace_id1] )^2 + (y-y[v_trace_id1] )^2 + (z-z[v_trace_id1] )^2 < v_cutoff_dumpnb^2 "
label		end_traceid1
# trace id2
if "${trace_id2} == 0" then &
  "jump SELF end_traceid2"
## define trace group, single atom or region near an atom
variable	check_nbid2 atom " (x-x[v_trace_id2] )^2 + (y-y[v_trace_id2] )^2 + (z-z[v_trace_id2] )^2 < v_cutoff_dumpnb^2 "
label		end_traceid2
# trace id3
if "${trace_id3} == 0" then &
  "jump SELF end_traceid3"
## define trace group, single atom or region near an atom
variable	check_nbid3 atom " (x-x[v_trace_id3] )^2 + (y-y[v_trace_id3] )^2 + (z-z[v_trace_id3] )^2 < v_cutoff_dumpnb^2 "
label		end_traceid3

# file, store variable of trace particle by fix vector and output by fix ave/time
if "${freq_fixvector} == 0" then "jump SELF skip_fixvector"
fix		vector_manytime all vector ${every_fixvector} v_trace_id #z[${trace_id}] vz[${trace_id}] fz[${trace_id}] c_n_contact[${trace_id}]
variable	fixvector vector f_vector_manytime
if "${freq_fixvector} == 0" then "jump SELF skip_fixvector"
fix		manytime all ave/time 1 1 ${freq_fixvector} v_fixvector mode vector file output/trace/fix.trace.allstep
label skip_fixvector

# compute for output
if "${freq_print_trace} == 0" then "jump SELF skip_print_trace"
compute radius all property/atom radius
compute omegax all property/atom omegax
compute omegay all property/atom omegay
compute omegaz all property/atom omegaz
compute tqx all property/atom tqx
compute tqy all property/atom tqy
compute tqz all property/atom tqz
# print time and step
fix print_step all print ${freq_print_trace} "$(step)" screen no append output/trace/step
fix print_time all print ${freq_print_trace} "$(time)" screen no append output/trace/time

# file print trace atom_maxKEt
if "${iftrace_maxKEt} == no" then "jump SELF skip_print_trace_maxKEt"

variable print_trace_maxKEt_scalar_id equal v_trace_id_maxKEt
variable print_trace_maxKEt_scalar_type equal type[v_trace_id_maxKEt]
variable print_trace_maxKEt_scalar_radius equal c_radius[v_trace_id_maxKEt]
variable print_trace_maxKEt_scalar_c_KEt_atom equal c_KEt_atom[v_trace_id_maxKEt]
variable print_trace_maxKEt_scalar_c_KEr_atom equal c_KEr_atom[v_trace_id_maxKEt]
variable print_trace_maxKEt_scalar_x equal x[v_trace_id_maxKEt]
variable print_trace_maxKEt_scalar_y equal y[v_trace_id_maxKEt]
variable print_trace_maxKEt_scalar_z equal z[v_trace_id_maxKEt]
variable print_trace_maxKEt_scalar_vx equal vx[v_trace_id_maxKEt]
variable print_trace_maxKEt_scalar_vy equal vy[v_trace_id_maxKEt]
variable print_trace_maxKEt_scalar_vz equal vz[v_trace_id_maxKEt]
variable print_trace_maxKEt_scalar_fx equal fx[v_trace_id_maxKEt]
variable print_trace_maxKEt_scalar_fy equal fy[v_trace_id_maxKEt]
variable print_trace_maxKEt_scalar_fz equal fz[v_trace_id_maxKEt]
variable print_trace_maxKEt_scalar_omegax equal c_omegax[v_trace_id_maxKEt]
variable print_trace_maxKEt_scalar_omegay equal c_omegay[v_trace_id_maxKEt]
variable print_trace_maxKEt_scalar_omegaz equal c_omegaz[v_trace_id_maxKEt]
variable print_trace_maxKEt_scalar_tqx equal c_tqx[v_trace_id_maxKEt]
variable print_trace_maxKEt_scalar_tqy equal c_tqy[v_trace_id_maxKEt]
variable print_trace_maxKEt_scalar_tqz equal c_tqz[v_trace_id_maxKEt]


fix print_maxKEt_id all print ${freq_print_trace} "$(v_print_trace_maxKEt_scalar_id)" screen no append output/trace/maxKEt/id
fix print_maxKEt_type all print ${freq_print_trace} "$(v_print_trace_maxKEt_scalar_type)" screen no append output/trace/maxKEt/type
fix print_maxKEt_radius all print ${freq_print_trace} "$(v_print_trace_maxKEt_scalar_radius)" screen no append output/trace/maxKEt/radius
fix print_maxKEt_c_KEt_atom all print ${freq_print_trace} "$(v_print_trace_maxKEt_scalar_c_KEt_atom)" screen no append output/trace/maxKEt/c_KEt_atom
fix print_maxKEt_c_KEr_atom all print ${freq_print_trace} "$(v_print_trace_maxKEt_scalar_c_KEr_atom)" screen no append output/trace/maxKEt/c_KEr_atom
fix print_maxKEt_x all print ${freq_print_trace} "$(v_print_trace_maxKEt_scalar_x)" screen no append output/trace/maxKEt/x
fix print_maxKEt_y all print ${freq_print_trace} "$(v_print_trace_maxKEt_scalar_y)" screen no append output/trace/maxKEt/y
fix print_maxKEt_z all print ${freq_print_trace} "$(v_print_trace_maxKEt_scalar_z)" screen no append output/trace/maxKEt/z
fix print_maxKEt_vx all print ${freq_print_trace} "$(v_print_trace_maxKEt_scalar_vx)" screen no append output/trace/maxKEt/vx
fix print_maxKEt_vy all print ${freq_print_trace} "$(v_print_trace_maxKEt_scalar_vy)" screen no append output/trace/maxKEt/vy
fix print_maxKEt_vz all print ${freq_print_trace} "$(v_print_trace_maxKEt_scalar_vz)" screen no append output/trace/maxKEt/vz
fix print_maxKEt_fx all print ${freq_print_trace} "$(v_print_trace_maxKEt_scalar_fx)" screen no append output/trace/maxKEt/fx
fix print_maxKEt_fy all print ${freq_print_trace} "$(v_print_trace_maxKEt_scalar_fy)" screen no append output/trace/maxKEt/fy
fix print_maxKEt_fz all print ${freq_print_trace} "$(v_print_trace_maxKEt_scalar_fz)" screen no append output/trace/maxKEt/fz
fix print_maxKEt_omegax all print ${freq_print_trace} "$(v_print_trace_maxKEt_scalar_omegax)" screen no append output/trace/maxKEt/omegax
fix print_maxKEt_omegay all print ${freq_print_trace} "$(v_print_trace_maxKEt_scalar_omegay)" screen no append output/trace/maxKEt/omegay
fix print_maxKEt_omegaz all print ${freq_print_trace} "$(v_print_trace_maxKEt_scalar_omegaz)" screen no append output/trace/maxKEt/omegaz
fix print_maxKEt_tqx all print ${freq_print_trace} "$(v_print_trace_maxKEt_scalar_tqx)" screen no append output/trace/maxKEt/tqx
fix print_maxKEt_tqy all print ${freq_print_trace} "$(v_print_trace_maxKEt_scalar_tqy)" screen no append output/trace/maxKEt/tqy
fix print_maxKEt_tqz all print ${freq_print_trace} "$(v_print_trace_maxKEt_scalar_tqz)" screen no append output/trace/maxKEt/tqz

label skip_print_trace_maxKEt

# file print trace atom_maxKEr
if "${iftrace_maxKEr} == no" then "jump SELF skip_print_trace_maxKEr"

variable print_trace_maxKEr_scalar_id equal v_trace_id_maxKEr
variable print_trace_maxKEr_scalar_type equal type[v_trace_id_maxKEr]
variable print_trace_maxKEr_scalar_radius equal c_radius[v_trace_id_maxKEr]
variable print_trace_maxKEr_scalar_c_KEt_atom equal c_KEt_atom[v_trace_id_maxKEr]
variable print_trace_maxKEr_scalar_c_KEr_atom equal c_KEr_atom[v_trace_id_maxKEr]
variable print_trace_maxKEr_scalar_x equal x[v_trace_id_maxKEr]
variable print_trace_maxKEr_scalar_y equal y[v_trace_id_maxKEr]
variable print_trace_maxKEr_scalar_z equal z[v_trace_id_maxKEr]
variable print_trace_maxKEr_scalar_vx equal vx[v_trace_id_maxKEr]
variable print_trace_maxKEr_scalar_vy equal vy[v_trace_id_maxKEr]
variable print_trace_maxKEr_scalar_vz equal vz[v_trace_id_maxKEr]
variable print_trace_maxKEr_scalar_fx equal fx[v_trace_id_maxKEr]
variable print_trace_maxKEr_scalar_fy equal fy[v_trace_id_maxKEr]
variable print_trace_maxKEr_scalar_fz equal fz[v_trace_id_maxKEr]
variable print_trace_maxKEr_scalar_omegax equal c_omegax[v_trace_id_maxKEr]
variable print_trace_maxKEr_scalar_omegay equal c_omegay[v_trace_id_maxKEr]
variable print_trace_maxKEr_scalar_omegaz equal c_omegaz[v_trace_id_maxKEr]
variable print_trace_maxKEr_scalar_tqx equal c_tqx[v_trace_id_maxKEr]
variable print_trace_maxKEr_scalar_tqy equal c_tqy[v_trace_id_maxKEr]
variable print_trace_maxKEr_scalar_tqz equal c_tqz[v_trace_id_maxKEr]


fix print_maxKEr_id all print ${freq_print_trace} "$(v_print_trace_maxKEr_scalar_id)" screen no append output/trace/maxKEr/id
fix print_maxKEr_type all print ${freq_print_trace} "$(v_print_trace_maxKEr_scalar_type)" screen no append output/trace/maxKEr/type
fix print_maxKEr_radius all print ${freq_print_trace} "$(v_print_trace_maxKEr_scalar_radius)" screen no append output/trace/maxKEr/radius
fix print_maxKEr_c_KEt_atom all print ${freq_print_trace} "$(v_print_trace_maxKEr_scalar_c_KEt_atom)" screen no append output/trace/maxKEr/c_KEt_atom
fix print_maxKEr_c_KEr_atom all print ${freq_print_trace} "$(v_print_trace_maxKEr_scalar_c_KEr_atom)" screen no append output/trace/maxKEr/c_KEr_atom
fix print_maxKEr_x all print ${freq_print_trace} "$(v_print_trace_maxKEr_scalar_x)" screen no append output/trace/maxKEr/x
fix print_maxKEr_y all print ${freq_print_trace} "$(v_print_trace_maxKEr_scalar_y)" screen no append output/trace/maxKEr/y
fix print_maxKEr_z all print ${freq_print_trace} "$(v_print_trace_maxKEr_scalar_z)" screen no append output/trace/maxKEr/z
fix print_maxKEr_vx all print ${freq_print_trace} "$(v_print_trace_maxKEr_scalar_vx)" screen no append output/trace/maxKEr/vx
fix print_maxKEr_vy all print ${freq_print_trace} "$(v_print_trace_maxKEr_scalar_vy)" screen no append output/trace/maxKEr/vy
fix print_maxKEr_vz all print ${freq_print_trace} "$(v_print_trace_maxKEr_scalar_vz)" screen no append output/trace/maxKEr/vz
fix print_maxKEr_fx all print ${freq_print_trace} "$(v_print_trace_maxKEr_scalar_fx)" screen no append output/trace/maxKEr/fx
fix print_maxKEr_fy all print ${freq_print_trace} "$(v_print_trace_maxKEr_scalar_fy)" screen no append output/trace/maxKEr/fy
fix print_maxKEr_fz all print ${freq_print_trace} "$(v_print_trace_maxKEr_scalar_fz)" screen no append output/trace/maxKEr/fz
fix print_maxKEr_omegax all print ${freq_print_trace} "$(v_print_trace_maxKEr_scalar_omegax)" screen no append output/trace/maxKEr/omegax
fix print_maxKEr_omegay all print ${freq_print_trace} "$(v_print_trace_maxKEr_scalar_omegay)" screen no append output/trace/maxKEr/omegay
fix print_maxKEr_omegaz all print ${freq_print_trace} "$(v_print_trace_maxKEr_scalar_omegaz)" screen no append output/trace/maxKEr/omegaz
fix print_maxKEr_tqx all print ${freq_print_trace} "$(v_print_trace_maxKEr_scalar_tqx)" screen no append output/trace/maxKEr/tqx
fix print_maxKEr_tqy all print ${freq_print_trace} "$(v_print_trace_maxKEr_scalar_tqy)" screen no append output/trace/maxKEr/tqy
fix print_maxKEr_tqz all print ${freq_print_trace} "$(v_print_trace_maxKEr_scalar_tqz)" screen no append output/trace/maxKEr/tqz

label skip_print_trace_maxKEr

# file print trace atom_maxKEtr
if "${iftrace_maxKEtr} == no" then "jump SELF skip_print_trace_maxKEtr"

variable print_trace_maxKEtr_scalar_id equal v_trace_id_maxKEtr
variable print_trace_maxKEtr_scalar_type equal type[v_trace_id_maxKEtr]
variable print_trace_maxKEtr_scalar_radius equal c_radius[v_trace_id_maxKEtr]
variable print_trace_maxKEtr_scalar_c_KEt_atom equal c_KEt_atom[v_trace_id_maxKEtr]
variable print_trace_maxKEtr_scalar_c_KEr_atom equal c_KEr_atom[v_trace_id_maxKEtr]
variable print_trace_maxKEtr_scalar_x equal x[v_trace_id_maxKEtr]
variable print_trace_maxKEtr_scalar_y equal y[v_trace_id_maxKEtr]
variable print_trace_maxKEtr_scalar_z equal z[v_trace_id_maxKEtr]
variable print_trace_maxKEtr_scalar_vx equal vx[v_trace_id_maxKEtr]
variable print_trace_maxKEtr_scalar_vy equal vy[v_trace_id_maxKEtr]
variable print_trace_maxKEtr_scalar_vz equal vz[v_trace_id_maxKEtr]
variable print_trace_maxKEtr_scalar_fx equal fx[v_trace_id_maxKEtr]
variable print_trace_maxKEtr_scalar_fy equal fy[v_trace_id_maxKEtr]
variable print_trace_maxKEtr_scalar_fz equal fz[v_trace_id_maxKEtr]
variable print_trace_maxKEtr_scalar_omegax equal c_omegax[v_trace_id_maxKEtr]
variable print_trace_maxKEtr_scalar_omegay equal c_omegay[v_trace_id_maxKEtr]
variable print_trace_maxKEtr_scalar_omegaz equal c_omegaz[v_trace_id_maxKEtr]
variable print_trace_maxKEtr_scalar_tqx equal c_tqx[v_trace_id_maxKEtr]
variable print_trace_maxKEtr_scalar_tqy equal c_tqy[v_trace_id_maxKEtr]
variable print_trace_maxKEtr_scalar_tqz equal c_tqz[v_trace_id_maxKEtr]


fix print_maxKEtr_id all print ${freq_print_trace} "$(v_print_trace_maxKEtr_scalar_id)" screen no append output/trace/maxKEtr/id
fix print_maxKEtr_type all print ${freq_print_trace} "$(v_print_trace_maxKEtr_scalar_type)" screen no append output/trace/maxKEtr/type
fix print_maxKEtr_radius all print ${freq_print_trace} "$(v_print_trace_maxKEtr_scalar_radius)" screen no append output/trace/maxKEtr/radius
fix print_maxKEtr_c_KEt_atom all print ${freq_print_trace} "$(v_print_trace_maxKEtr_scalar_c_KEt_atom)" screen no append output/trace/maxKEtr/c_KEt_atom
fix print_maxKEtr_c_KEr_atom all print ${freq_print_trace} "$(v_print_trace_maxKEtr_scalar_c_KEr_atom)" screen no append output/trace/maxKEtr/c_KEr_atom
fix print_maxKEtr_x all print ${freq_print_trace} "$(v_print_trace_maxKEtr_scalar_x)" screen no append output/trace/maxKEtr/x
fix print_maxKEtr_y all print ${freq_print_trace} "$(v_print_trace_maxKEtr_scalar_y)" screen no append output/trace/maxKEtr/y
fix print_maxKEtr_z all print ${freq_print_trace} "$(v_print_trace_maxKEtr_scalar_z)" screen no append output/trace/maxKEtr/z
fix print_maxKEtr_vx all print ${freq_print_trace} "$(v_print_trace_maxKEtr_scalar_vx)" screen no append output/trace/maxKEtr/vx
fix print_maxKEtr_vy all print ${freq_print_trace} "$(v_print_trace_maxKEtr_scalar_vy)" screen no append output/trace/maxKEtr/vy
fix print_maxKEtr_vz all print ${freq_print_trace} "$(v_print_trace_maxKEtr_scalar_vz)" screen no append output/trace/maxKEtr/vz
fix print_maxKEtr_fx all print ${freq_print_trace} "$(v_print_trace_maxKEtr_scalar_fx)" screen no append output/trace/maxKEtr/fx
fix print_maxKEtr_fy all print ${freq_print_trace} "$(v_print_trace_maxKEtr_scalar_fy)" screen no append output/trace/maxKEtr/fy
fix print_maxKEtr_fz all print ${freq_print_trace} "$(v_print_trace_maxKEtr_scalar_fz)" screen no append output/trace/maxKEtr/fz
fix print_maxKEtr_omegax all print ${freq_print_trace} "$(v_print_trace_maxKEtr_scalar_omegax)" screen no append output/trace/maxKEtr/omegax
fix print_maxKEtr_omegay all print ${freq_print_trace} "$(v_print_trace_maxKEtr_scalar_omegay)" screen no append output/trace/maxKEtr/omegay
fix print_maxKEtr_omegaz all print ${freq_print_trace} "$(v_print_trace_maxKEtr_scalar_omegaz)" screen no append output/trace/maxKEtr/omegaz
fix print_maxKEtr_tqx all print ${freq_print_trace} "$(v_print_trace_maxKEtr_scalar_tqx)" screen no append output/trace/maxKEtr/tqx
fix print_maxKEtr_tqy all print ${freq_print_trace} "$(v_print_trace_maxKEtr_scalar_tqy)" screen no append output/trace/maxKEtr/tqy
fix print_maxKEtr_tqz all print ${freq_print_trace} "$(v_print_trace_maxKEtr_scalar_tqz)" screen no append output/trace/maxKEtr/tqz

label skip_print_trace_maxKEtr


# file print trace atom_1
if "${trace_id1} == 0" then "jump SELF skip_print_trace_1"

variable print_trace_1_scalar_id equal v_trace_id1
variable print_trace_1_scalar_type equal type[v_trace_id1]
variable print_trace_1_scalar_radius equal c_radius[v_trace_id1]
variable print_trace_1_scalar_c_KEt_atom equal c_KEt_atom[v_trace_id1]
variable print_trace_1_scalar_c_KEr_atom equal c_KEr_atom[v_trace_id1]
variable print_trace_1_scalar_x equal x[v_trace_id1]
variable print_trace_1_scalar_y equal y[v_trace_id1]
variable print_trace_1_scalar_z equal z[v_trace_id1]
variable print_trace_1_scalar_vx equal vx[v_trace_id1]
variable print_trace_1_scalar_vy equal vy[v_trace_id1]
variable print_trace_1_scalar_vz equal vz[v_trace_id1]
variable print_trace_1_scalar_fx equal fx[v_trace_id1]
variable print_trace_1_scalar_fy equal fy[v_trace_id1]
variable print_trace_1_scalar_fz equal fz[v_trace_id1]
variable print_trace_1_scalar_omegax equal c_omegax[v_trace_id1]
variable print_trace_1_scalar_omegay equal c_omegay[v_trace_id1]
variable print_trace_1_scalar_omegaz equal c_omegaz[v_trace_id1]
variable print_trace_1_scalar_tqx equal c_tqx[v_trace_id1]
variable print_trace_1_scalar_tqy equal c_tqy[v_trace_id1]
variable print_trace_1_scalar_tqz equal c_tqz[v_trace_id1]

fix print_1_id all print ${freq_print_trace} "$(v_print_trace_1_scalar_id)" screen no append output/trace/${trace_id1}/id
fix print_1_type all print ${freq_print_trace} "$(v_print_trace_1_scalar_type)" screen no append output/trace/${trace_id1}/type
fix print_1_radius all print ${freq_print_trace} "$(v_print_trace_1_scalar_radius)" screen no append output/trace/${trace_id1}/radius
fix print_1_c_KEt_atom all print ${freq_print_trace} "$(v_print_trace_1_scalar_c_KEt_atom)" screen no append output/trace/${trace_id1}/c_KEt_atom
fix print_1_c_KEr_atom all print ${freq_print_trace} "$(v_print_trace_1_scalar_c_KEr_atom)" screen no append output/trace/${trace_id1}/c_KEr_atom
fix print_1_x all print ${freq_print_trace} "$(v_print_trace_1_scalar_x)" screen no append output/trace/${trace_id1}/x
fix print_1_y all print ${freq_print_trace} "$(v_print_trace_1_scalar_y)" screen no append output/trace/${trace_id1}/y
fix print_1_z all print ${freq_print_trace} "$(v_print_trace_1_scalar_z)" screen no append output/trace/${trace_id1}/z
fix print_1_vx all print ${freq_print_trace} "$(v_print_trace_1_scalar_vx)" screen no append output/trace/${trace_id1}/vx
fix print_1_vy all print ${freq_print_trace} "$(v_print_trace_1_scalar_vy)" screen no append output/trace/${trace_id1}/vy
fix print_1_vz all print ${freq_print_trace} "$(v_print_trace_1_scalar_vz)" screen no append output/trace/${trace_id1}/vz
fix print_1_fx all print ${freq_print_trace} "$(v_print_trace_1_scalar_fx)" screen no append output/trace/${trace_id1}/fx
fix print_1_fy all print ${freq_print_trace} "$(v_print_trace_1_scalar_fy)" screen no append output/trace/${trace_id1}/fy
fix print_1_fz all print ${freq_print_trace} "$(v_print_trace_1_scalar_fz)" screen no append output/trace/${trace_id1}/fz
fix print_1_omegax all print ${freq_print_trace} "$(v_print_trace_1_scalar_omegax)" screen no append output/trace/${trace_id1}/omegax
fix print_1_omegay all print ${freq_print_trace} "$(v_print_trace_1_scalar_omegay)" screen no append output/trace/${trace_id1}/omegay
fix print_1_omegaz all print ${freq_print_trace} "$(v_print_trace_1_scalar_omegaz)" screen no append output/trace/${trace_id1}/omegaz
fix print_1_tqx all print ${freq_print_trace} "$(v_print_trace_1_scalar_tqx)" screen no append output/trace/${trace_id1}/tqx
fix print_1_tqy all print ${freq_print_trace} "$(v_print_trace_1_scalar_tqy)" screen no append output/trace/${trace_id1}/tqy
fix print_1_tqz all print ${freq_print_trace} "$(v_print_trace_1_scalar_tqz)" screen no append output/trace/${trace_id1}/tqz

label skip_print_trace_1


# file print trace atom_2
if "${trace_id2} == 0" then "jump SELF skip_print_trace_2"

variable print_trace_2_scalar_id equal v_trace_id2
variable print_trace_2_scalar_type equal type[v_trace_id2]
variable print_trace_2_scalar_radius equal c_radius[v_trace_id2]
variable print_trace_2_scalar_c_KEt_atom equal c_KEt_atom[v_trace_id2]
variable print_trace_2_scalar_c_KEr_atom equal c_KEr_atom[v_trace_id2]
variable print_trace_2_scalar_x equal x[v_trace_id2]
variable print_trace_2_scalar_y equal y[v_trace_id2]
variable print_trace_2_scalar_z equal z[v_trace_id2]
variable print_trace_2_scalar_vx equal vx[v_trace_id2]
variable print_trace_2_scalar_vy equal vy[v_trace_id2]
variable print_trace_2_scalar_vz equal vz[v_trace_id2]
variable print_trace_2_scalar_fx equal fx[v_trace_id2]
variable print_trace_2_scalar_fy equal fy[v_trace_id2]
variable print_trace_2_scalar_fz equal fz[v_trace_id2]
variable print_trace_2_scalar_omegax equal c_omegax[v_trace_id2]
variable print_trace_2_scalar_omegay equal c_omegay[v_trace_id2]
variable print_trace_2_scalar_omegaz equal c_omegaz[v_trace_id2]
variable print_trace_2_scalar_tqx equal c_tqx[v_trace_id2]
variable print_trace_2_scalar_tqy equal c_tqy[v_trace_id2]
variable print_trace_2_scalar_tqz equal c_tqz[v_trace_id2]

fix print_2_id all print ${freq_print_trace} "$(v_print_trace_2_scalar_id)" screen no append output/trace/${trace_id2}/id
fix print_2_type all print ${freq_print_trace} "$(v_print_trace_2_scalar_type)" screen no append output/trace/${trace_id2}/type
fix print_2_radius all print ${freq_print_trace} "$(v_print_trace_2_scalar_radius)" screen no append output/trace/${trace_id2}/radius
fix print_2_c_KEt_atom all print ${freq_print_trace} "$(v_print_trace_2_scalar_c_KEt_atom)" screen no append output/trace/${trace_id2}/c_KEt_atom
fix print_2_c_KEr_atom all print ${freq_print_trace} "$(v_print_trace_2_scalar_c_KEr_atom)" screen no append output/trace/${trace_id2}/c_KEr_atom
fix print_2_x all print ${freq_print_trace} "$(v_print_trace_2_scalar_x)" screen no append output/trace/${trace_id2}/x
fix print_2_y all print ${freq_print_trace} "$(v_print_trace_2_scalar_y)" screen no append output/trace/${trace_id2}/y
fix print_2_z all print ${freq_print_trace} "$(v_print_trace_2_scalar_z)" screen no append output/trace/${trace_id2}/z
fix print_2_vx all print ${freq_print_trace} "$(v_print_trace_2_scalar_vx)" screen no append output/trace/${trace_id2}/vx
fix print_2_vy all print ${freq_print_trace} "$(v_print_trace_2_scalar_vy)" screen no append output/trace/${trace_id2}/vy
fix print_2_vz all print ${freq_print_trace} "$(v_print_trace_2_scalar_vz)" screen no append output/trace/${trace_id2}/vz
fix print_2_fx all print ${freq_print_trace} "$(v_print_trace_2_scalar_fx)" screen no append output/trace/${trace_id2}/fx
fix print_2_fy all print ${freq_print_trace} "$(v_print_trace_2_scalar_fy)" screen no append output/trace/${trace_id2}/fy
fix print_2_fz all print ${freq_print_trace} "$(v_print_trace_2_scalar_fz)" screen no append output/trace/${trace_id2}/fz
fix print_2_omegax all print ${freq_print_trace} "$(v_print_trace_2_scalar_omegax)" screen no append output/trace/${trace_id2}/omegax
fix print_2_omegay all print ${freq_print_trace} "$(v_print_trace_2_scalar_omegay)" screen no append output/trace/${trace_id2}/omegay
fix print_2_omegaz all print ${freq_print_trace} "$(v_print_trace_2_scalar_omegaz)" screen no append output/trace/${trace_id2}/omegaz
fix print_2_tqx all print ${freq_print_trace} "$(v_print_trace_2_scalar_tqx)" screen no append output/trace/${trace_id2}/tqx
fix print_2_tqy all print ${freq_print_trace} "$(v_print_trace_2_scalar_tqy)" screen no append output/trace/${trace_id2}/tqy
fix print_2_tqz all print ${freq_print_trace} "$(v_print_trace_2_scalar_tqz)" screen no append output/trace/${trace_id2}/tqz

label skip_print_trace_2


# file print trace atom_3
if "${trace_id3} == 0" then "jump SELF skip_print_trace_3"

variable print_trace_3_scalar_id equal v_trace_id3
variable print_trace_3_scalar_type equal type[v_trace_id3]
variable print_trace_3_scalar_radius equal c_radius[v_trace_id3]
variable print_trace_3_scalar_c_KEt_atom equal c_KEt_atom[v_trace_id3]
variable print_trace_3_scalar_c_KEr_atom equal c_KEr_atom[v_trace_id3]
variable print_trace_3_scalar_x equal x[v_trace_id3]
variable print_trace_3_scalar_y equal y[v_trace_id3]
variable print_trace_3_scalar_z equal z[v_trace_id3]
variable print_trace_3_scalar_vx equal vx[v_trace_id3]
variable print_trace_3_scalar_vy equal vy[v_trace_id3]
variable print_trace_3_scalar_vz equal vz[v_trace_id3]
variable print_trace_3_scalar_fx equal fx[v_trace_id3]
variable print_trace_3_scalar_fy equal fy[v_trace_id3]
variable print_trace_3_scalar_fz equal fz[v_trace_id3]
variable print_trace_3_scalar_omegax equal c_omegax[v_trace_id3]
variable print_trace_3_scalar_omegay equal c_omegay[v_trace_id3]
variable print_trace_3_scalar_omegaz equal c_omegaz[v_trace_id3]
variable print_trace_3_scalar_tqx equal c_tqx[v_trace_id3]
variable print_trace_3_scalar_tqy equal c_tqy[v_trace_id3]
variable print_trace_3_scalar_tqz equal c_tqz[v_trace_id3]

fix print_3_id all print ${freq_print_trace} "$(v_print_trace_3_scalar_id)" screen no append output/trace/${trace_id3}/id
fix print_3_type all print ${freq_print_trace} "$(v_print_trace_3_scalar_type)" screen no append output/trace/${trace_id3}/type
fix print_3_radius all print ${freq_print_trace} "$(v_print_trace_3_scalar_radius)" screen no append output/trace/${trace_id3}/radius
fix print_3_c_KEt_atom all print ${freq_print_trace} "$(v_print_trace_3_scalar_c_KEt_atom)" screen no append output/trace/${trace_id3}/c_KEt_atom
fix print_3_c_KEr_atom all print ${freq_print_trace} "$(v_print_trace_3_scalar_c_KEr_atom)" screen no append output/trace/${trace_id3}/c_KEr_atom
fix print_3_x all print ${freq_print_trace} "$(v_print_trace_3_scalar_x)" screen no append output/trace/${trace_id3}/x
fix print_3_y all print ${freq_print_trace} "$(v_print_trace_3_scalar_y)" screen no append output/trace/${trace_id3}/y
fix print_3_z all print ${freq_print_trace} "$(v_print_trace_3_scalar_z)" screen no append output/trace/${trace_id3}/z
fix print_3_vx all print ${freq_print_trace} "$(v_print_trace_3_scalar_vx)" screen no append output/trace/${trace_id3}/vx
fix print_3_vy all print ${freq_print_trace} "$(v_print_trace_3_scalar_vy)" screen no append output/trace/${trace_id3}/vy
fix print_3_vz all print ${freq_print_trace} "$(v_print_trace_3_scalar_vz)" screen no append output/trace/${trace_id3}/vz
fix print_3_fx all print ${freq_print_trace} "$(v_print_trace_3_scalar_fx)" screen no append output/trace/${trace_id3}/fx
fix print_3_fy all print ${freq_print_trace} "$(v_print_trace_3_scalar_fy)" screen no append output/trace/${trace_id3}/fy
fix print_3_fz all print ${freq_print_trace} "$(v_print_trace_3_scalar_fz)" screen no append output/trace/${trace_id3}/fz
fix print_3_omegax all print ${freq_print_trace} "$(v_print_trace_3_scalar_omegax)" screen no append output/trace/${trace_id3}/omegax
fix print_3_omegay all print ${freq_print_trace} "$(v_print_trace_3_scalar_omegay)" screen no append output/trace/${trace_id3}/omegay
fix print_3_omegaz all print ${freq_print_trace} "$(v_print_trace_3_scalar_omegaz)" screen no append output/trace/${trace_id3}/omegaz
fix print_3_tqx all print ${freq_print_trace} "$(v_print_trace_3_scalar_tqx)" screen no append output/trace/${trace_id3}/tqx
fix print_3_tqy all print ${freq_print_trace} "$(v_print_trace_3_scalar_tqy)" screen no append output/trace/${trace_id3}/tqy
fix print_3_tqz all print ${freq_print_trace} "$(v_print_trace_3_scalar_tqz)" screen no append output/trace/${trace_id3}/tqz

label skip_print_trace_3

label skip_print_trace

variable	check_nb_all atom v_check_nbid1||v_check_nbid2||v_check_nbid3||v_check_nbmaxKEt||v_check_nbmaxKEr||v_check_nbmaxKEtr
if "${ifpour} == no || ${rst_from} != 0" then "jump SELF end_pour3"
run 1
label	end_pour3
if "${ifdeposit} == no || ${rst_from} != 0" then "jump SELF end_deposit2"
run 1
label	end_deposit2
group 		group_nb_all dynamic all var check_nb_all every 1

# file dump custom trace atoms
if "${freq_dump_single_trace} == 0" then "jump SELF skip_dump_single_trace"
if "${freq_ave_wall} == 0" then &
"dump		dump_trace group_nb_all custom ${freq_dump_single_trace} output/single_trace/dump.trace.single.* &
id type radius c_KEt_atom c_KEr_atom x y z vx vy vz fx fy fz omegax omegay omegaz tqx tqy tqz v_EKP_atom c_n_contact v_check_nb_all v_KEtr_atom" &
else &
"dump		dump_trace group_nb_all custom ${freq_dump_single_trace} output/single_trace/dump.trace.single.* &
id type radius c_KEt_atom c_KEr_atom x y z vx vy vz fx fy fz omegax omegay omegaz tqx tqy tqz v_EKP_atom c_n_contact v_check_nb_all v_KEtr_atom &
f_sum_pairforce[*]"
dump_modify     dump_trace format float %.16g
label skip_dump_single_trace
# file, dump custom all atoms
if "${freq_dump_single_all} == 0" then "jump SELF skip_dump_all_custom"
if "${freq_ave_wall} == 0" then &
"dump		dump_all all custom ${freq_dump_single_all} output/single_all/dump.all.single.* &
id type radius c_KEt_atom c_KEr_atom x y z vx vy vz fx fy fz omegax omegay omegaz tqx tqy tqz v_EKP_atom c_n_contact v_check_nb_all v_KEtr_atom" &
else &
"dump		dump_all all custom ${freq_dump_single_all} output/single_all/dump.all.single.* &
id type radius c_KEt_atom c_KEr_atom x y z vx vy vz fx fy fz omegax omegay omegaz tqx tqy tqz v_EKP_atom c_n_contact v_check_nb_all v_KEtr_atom &
f_sum_pairforce[*]"
dump_modify	dump_all format float %.16g maxfiles ${n_maxfile_single_all}
label skip_dump_all_custom

# compute and output pair trace atoms
if "${freq_dump_pair_trace} == 0" then "jump SELF skip_dump_pair_trace"
compute		p_idtype_trace group_nb_all property/local patom1 patom2 ptype1 ptype2	#id_I id_J type_I type_J
compute		p_fv_trace group_nb_all pair/local dist fx fy fz force p1 p2 p3 p4 p5 p6 p7 p8 p9 p10 	#p1,p2,p3,ft component. p4 ft magnitude. p5 p6 p7 vn. p8 p9 p10 vt. Force acting on I atom. Velocity is vi-vj
# file, pair trace atoms
dump		dump_pair_trace group_nb_all local ${freq_dump_pair_trace} output/pair_trace/dump.trace.pair.* index c_p_idtype_trace[*] c_p_fv_trace[*]
dump_modify     dump_pair_trace format float %.16g
label skip_dump_pair_trace

# compute pair all atoms
if "${freq_dump_pair_all} == 0" then "jump SELF skip_dump_pair_all"
compute		p_idtype_all all property/local patom1 patom2 ptype1 ptype2	#id_I id_J type_I type_J
compute		p_fv_all all pair/local dist fx fy fz force p1 p2 p3 p4 p5 p6 p7 p8 p9 p10 	#p1,p2,p3,ft component. p4 ft magnitude. p5 p6 p7 vn. p8 p9 p10 vt. Force acting on I atom. Velocity is vi-vj
# file, pair all atoms
dump		dump_pair_all all local ${freq_dump_pair_all} output/pair_all/dump.all.pair.* index c_p_idtype_all[*] c_p_fv_all[*]
dump_modify     dump_pair_all format float %.16g
label skip_dump_pair_all

#file, image jpg trace atoms
if "${freq_dump_trace_image} == 0" then "jump SELF skip_dump_trace_image"
dump		dump_image_trace group_nb_all image ${freq_dump_trace_image} output/image/trace/dump.trace_image.*.jpg type diameter size 512 512 zoom 1
label skip_dump_trace_image

#file, image jpg all atoms
if "${freq_dump_all_image} == 0" then "jump SELF skip_dump_all_image"
dump		dump_image_all all image ${freq_dump_all_image} output/image/all/all_image_*.jpg type diameter size 512 512 zoom 1
label skip_dump_all_image

#file, movie, have not work
if "${freq_dump_all_movie} == 0" then "jump SELF skip_dump_all_movie"
dump   m0 all movie ${freq_dump_movie} output/movie/movie.allstep.m4v type type size 640 480
label skip_dump_all_movie

#file, vtk
if "${freq_dump_all_vtk} == 0" then "jump SELF skip_dump_all_vtk"
dump            dmpatom all atom/vtk ${freq_dump_vtk} vtk/atom.*.vtk
label skip_dump_all_vtk

#file, stl
if "${freq_dump_all_stl} == 0" then "jump SELF skip_dump_all_stl"
dump            dmpstl1 all mesh/stl ${freq_dump_stl} stl/in*.stl cad1
dump            dmpstl2 all mesh/stl ${freq_dump_stl} stl/out*.stl cad2
label skip_dump_all_stl

# test
if "${freq_test1} == 0" then "jump SELF skip_test1"
compute r_z_max all reduce max v_d_z_axis z
variable escape_simubox_rmax equal "c_r_z_max[1] > v_ro_box"
variable escape_simubox_zmax equal "c_r_z_max[2] > v_zhi_box"
variable escape_simubox_rmin equal "c_r_z_min[1] < 0"
variable escape_simubox_zmin equal "c_r_z_min[2] < 0"
fix test1 all print ${freq_test1} "$(v_escape_simubox_rmax) $(v_escape_simubox_zmax) $(v_escape_simubox_rmin) $(v_escape_simubox_zmin)" screen no append output/test/test1
label skip_test1
if "${freq_test2} == 0" then "jump SELF skip_test2"
compute r_z_min all reduce min v_d_z_axis z
variable escape_wall_rmax equal "c_r_z_max[1] > v_ro_wall"
variable escape_wall_zmax equal "c_r_z_max[2] > v_zhi_wall"
variable escape_wall_rmin equal "c_r_z_min[1] < v_ri_wall"
variable escape_wall_zmin equal "c_r_z_min[2] < v_zlo_wall"
fix test2 all print ${freq_test2} "$(v_escape_wall_rmax) $(v_escape_wall_zmax) $(v_escape_wall_rmin) $(v_escape_wall_zmin)" screen no append output/test/test2
label skip_test2
if "${freq_test3} == 0" then "jump SELF skip_test3"
fix test3 all print ${freq_test3} "$(c_r_z_max[1]) $(c_r_z_max[2]) $(c_r_z_min[1]) $(c_r_z_min[2])" screen no append output/test/test3
label skip_test3

variable  ke_per_atom   equal   ke/atoms
# file, thermo
if "${iftrace_maxKEt} == yes" then &
"thermo_style	custom step time vol atoms ke v_ke_per_atom c_KEr pe v_KEtr v_EKP c_id_maxKEt[1] c_id_maxKEt[2]" &
else &
"thermo_style	custom step time vol atoms ke v_ke_per_atom c_KEr pe v_KEtr v_EKP"
thermo_modify   lost ${thermo_lost_error_or_warn} norm no
if "${freq_thermo} == 0" then "jump SELF skip_thermo"
thermo		${freq_thermo} #${freq_thermo} v_freq_thermo #
label skip_thermo

# ifcondition meet than stop
if "${freq_check_condition_exit} == -1" then &
"jump SELF skip_check_condition_exit"
variable set_condition equal "(v_ke_per_atom < v_ke_per_atom_check) && (step > 1000)"
fix checkhalt all halt ${freq_check_condition_exit} v_set_condition == 1.0
label skip_check_condition_exit

# file, restart file
if "${freq_restart_big} == 0" then "jump SELF skip_restart_big"
restart		${freq_restart_big} output/rst/restart.mpiio.*
label skip_restart_big
if "${freq_restart_small} == 0" then "jump SELF skip_restart_small"
restart		${freq_restart_small} output/rst/restart.mpiio.tmp1 output/rst/restart.mpiio.tmp2
label skip_restart_small

# run pour and delete and add inner wall
if "${ifpour} == no || ${rst_from} != 0" then "jump SELF end_pour2_innerwall"
run 10
region       	delete_in_small cylinder z 0. 0. ${ri_create} ${zlo_box} ${zhi_box} units box
delete_atoms 	region delete_in_small

if "${freq_ave_wall} != 0" then "fix	storeforce_inwall_before	all store/force"
if "${contact_model} != hooke_his" &
 then "jump SELF hooke_his_end3"
if "${ifrotate} == yes" then &
  "fix	inwall		all wall/gran hooke/history ${kn} ${kt} ${gamma_n} ${gamma_t} ${xmu} ${ifdamp_tangent} zcylinder ${ri_wall} shear x ${in_velocity_negative}" &
else &
  "fix	inwall		all wall/gran hooke/history ${kn} ${kt} ${gamma_n} ${gamma_t} ${xmu} ${ifdamp_tangent} zcylinder ${ri_wall}"
label hooke_his_end3

if "${contact_model} != hooke" &
 then "jump SELF hooke_end3"
if "${ifrotate} == yes" then &
  "fix	inwall		all wall/gran hooke ${kn} ${kt} ${gamma_n} ${gamma_t} ${xmu} ${ifdamp_tangent} zcylinder ${ri_wall} shear x ${in_velocity_negative}" &
else &
  "fix	inwall		all wall/gran hooke ${kn} ${kt} ${gamma_n} ${gamma_t} ${xmu} ${ifdamp_tangent} zcylinder ${ri_wall}"
label hooke_end3
if "${freq_ave_wall} != 0" then "fix	storeforce_inwall_after	all store/force"
label	end_pour2_innerwall

# file, time average of total force of wall to particles
if "${freq_ave_wall} == 0" then "jump SELF skip_ave_wall2"
fix		timeav_inwall_force all ave/time ${every_ave_wall} ${repeat_ave_wall} ${freq_ave_wall} &
v_t &
v_force_inwall_r v_force_inwall_theta v_force_inwall_z &
mode scalar ave one file output/wall/force_inwall_to_particle.allstep
fix		timeav_outwall_force all ave/time ${every_ave_wall} ${repeat_ave_wall} ${freq_ave_wall} &
v_t &
v_force_outwall_r v_force_outwall_theta v_force_outwall_z &
mode scalar ave one file output/wall/force_outwall_to_particle.allstep
fix		timeav_zbottom_force all ave/time ${every_ave_wall} ${repeat_ave_wall} ${freq_ave_wall} &
v_t &
v_force_zbottom_r v_force_zbottom_theta v_force_zbottom_z &
mode scalar ave one file output/wall/force_zbottom_to_particle.allstep
label skip_ave_wall2

# balance every freq_balance step
if "${freq_balance} == 0" then "jump SELF skip_balance1"
#balance 	1.0 shift yz 100 1.05
fix balance1 all balance ${freq_balance} 1.02 shift yz 100 1.01 weight time 1.0
label skip_balance1

# run

if "${runstep_loop} == 0" then "jump SELF skip_loop1"
variable a loop ${n_loop}
label loop
run ${runstep_loop}
if "$(c_id_maxKEt[2]) < ${KEtr_to_jumpout}" then "jump SELF break1"
next a
jump SELF loop
label break1
print "Loop condition satisfied"
label skip_loop1

if "${runstep_loop} != 0" then "jump SELF skip_run1"
run ${runstep}
label skip_run1
